*Heading
** Job name: 3G-V1 Model name: 3G-V1
** Generated by: Abaqus/CAE Version 6.8-1
*Preprint, echo=NO, model=NO, history=NO, contact=NO
**
** PARTS
**
*Part, name=PART-1
*Node
      1,      24.5,      51
      2,      15.5,      51
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*Element, type=CPS4R
1,      954,      956,      1042,      955
2,      954,      349,      1103,      956
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*Elset, elset=M1
1, 2, 3, 4, 5, 6
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*Elset, elset=M2
1513, 1514, 1515, 1516, 1517, 1518
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*Elset, elset=M3
7158, 7159, 7160, 7161, 7162, 7163
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*Elset, elset=M4
823, 824, 825, 826, 827, 828
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*Elset, elset=M5
3202, 3203, 3204, 3205, 3206, 3207
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*Elset, elset=M6
5320, 5321, 5322, 5323, 5324, 5325
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*Elset, elset=M7
563, 564, 565, 566, 567, 568
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*Elset, elset=M8
2301, 2302, 2303, 2304, 2305, 2306
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*Elset, elset=M9
3269, 3270, 3271, 3272, 3273, 3274
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*Elset, elset=M10
4203, 4204, 4205, 4206, 4207, 4208
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*Elset, elset=M11
4582, 4583, 4584, 4585, 4586, 4587
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*Elset, elset=M12
4790, 4791, 4792, 4793, 4794, 4795
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*Elset, elset=M13
5527, 5528, 5529, 5530, 5531, 5532
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*Elset, elset=M14
5807, 5808, 5809, 5810, 5811, 5812
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*Elset, elset=M15
6711, 6712, 6713, 6714, 6715, 6716
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*Elset, elset=M16
9258, 9259, 9260, 9261, 9262, 9263
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*Elset, elset=M17
10661, 10662, 10663, 10664, 10665, 10666
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*Elset, elset=M18
11291, 11292, 11293, 11294, 11295, 11296
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*Elset, elset=M19
12054, 12055, 12056, 12057, 12058, 12059
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*Nset, nset=N1
6, 28, 40, 55, 124, 125
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*Nset, nset=N2
196, 200, 206, 208, 211, 213
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*Nset, nset=N3
74, 76, 77, 79, 80, 81
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*Nset, nset=N4
1, 2, 3, 7, 9, 15
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** Section: Section-1-M1
*Solid Section, elset=M1, material=A1
1.,
** Section: Section-2-M2
*Solid Section, elset=M2, material=A2
1.,
** Section: Section-3-M3
*Solid Section, elset=M3, material=A3
1.,
** Section: Section-4-M4
*Solid Section, elset=M4, material=A4
1.,
** Section: Section-5-M5
*Solid Section, elset=M5, material=A5
1.,
** Section: Section-6-M6
*Solid Section, elset=M6, material=A6
1.,
** Section: Section-7-M7
*Solid Section, elset=M7, material=A7
1.,
** Section: Section-8-M8
*Solid Section, elset=M8, material=A8
1.,
** Section: Section-9-M9
*Solid Section, elset=M9, material=A9
1.,
** Section: Section-10-M10
*Solid Section, elset=M10, material=A10
1.,
** Section: Section-11-M11
*Solid Section, elset=M11, material=A11
1.,
** Section: Section-12-M12
*Solid Section, elset=M12, material=A12
1.,
** Section: Section-13-M13
*Solid Section, elset=M13, material=A13
1.,
** Section: Section-14-M14
*Solid Section, elset=M14, material=A14
1.,
** Section: Section-15-M15
*Solid Section, elset=M15, material=A15
1.,
** Section: Section-16-M16
*Solid Section, elset=M16, material=A16
1.,
** Section: Section-17-M17
*Solid Section, elset=M17, material=A17
1.,
** Section: Section-18-M18
*Solid Section, elset=M18, material=A18
1.,
** Section: Section-19-M19
*Solid Section, elset=M19, material=A19
1.,
*End Part
**
**
** ASSEMBLY
**
* Assembly, name=Assembly
**
*Instance, name=PART-1-1, part=PART-1
*End Instance
**
*End Assembly
**
** MATERIALS
**
*Material, name=A1
*Elastic
2.1e+11, 0.3
*Plastic
7.18936e+08, 0
*Material, name=A2
*Elastic
2.1e+11, 0.3
*Plastic
7.18936e+08, 0
*Material, name=A3
*Elastic
2.1e+11, 0.3
*Plastic
7.18936e+08, 0
*Material, name=A4
*Elastic
2.1e+11, 0.3
*Plastic
7.18936e+08, 0
*Material, name=A5
*Elastic
2.1e+11, 0.3
*Plastic
7.18936e+08, 0
*Material, name=A6
*Elastic
2.1e+11, 0.3
*Plastic
7.18936e+08, 0
*Material, name=A7
*Elastic
2.1e+11, 0.3
*Plastic
7.18936e+08, 0
*Material, name=A8
*Elastic
2.1e+11, 0.3
*Plastic
7.18936e+08, 0
*Material, name=A9
*Elastic
2.1e+11, 0.3
*Plastic
7.18936e+08, 0
*Material, name=A10
*Elastic
2.1e+11, 0.3
*Plastic
7.18936e+08, 0
*Material, name=A11
*Elastic
2.1e+11, 0.3
*Plastic
7.18936e+08, 0
*Material, name=A12
*Elastic
2.1e+11, 0.3
*Plastic
7.18936e+08, 0
*Material, name=A13
*Elastic
2.1e+11, 0.3
*Plastic
7.18936e+08, 0
*Material, name=A14
*Elastic
2.1e+11, 0.3
*Plastic
7.18936e+08, 0
*Material, name=A15
*Elastic
2.1e+11, 0.3
*Plastic
7.18936e+08, 0
*Material, name=A16
*Elastic
2.1e+11, 0.3
*Plastic
7.18936e+08, 0
*Material, name=A17
*Elastic
2.1e+11, 0.3
*Plastic
7.18936e+08, 0
*Material, name=A18
*Elastic
2.1e+11, 0.3
*Plastic
7.18936e+08, 0
*Material, name=A19
*Elastic
2.1e+11, 0.3
*Plastic
7.18936e+08, 0
** ----------------------------------------------------------------
**
** STEP: Step-1
**
*Step, name=Step-1, nlgeom=YES
*Static
1., 1., 1e-05, 1.
**
** BOUNDARY CONDITIONS
**
** Name: BC-1 Type: Displacement/Rotation
*Boundary
PART-1-1.N2, 1, 1, -15.
** Name: BC-2 Type: Displacement/Rotation
*Boundary
PART-1-1.N1, 1, 1
PART-1-1.N1, 2, 2
PART-1-1.N1, 6, 6
**
** OUTPUT REQUESTS
**
*Restart, write, frequency=0
**
** FIELD OUTPUT: F-Output-1
**
*Output, field, variable=PRESELECT
**
** HISTORY OUTPUT: H-Output-1
**
*Output, history, variable=PRESELECT
*End Step
